# Задание 1
i := 2
A := [1.05, 0.05, 0.87, 0.99; 2.78, -0.84, 1.24, 1.04; 2.01, -0.30, 0.78, 0.21; 0.42, 1.60, -3.24, 0.10]
j := 1
# Выделение 2й строки
Row2 := [0, 1, 0, 0]
Row2*A = [2.78, -0.84, 1.24, 1.04]
# Сумма элементов второй строки
SumElRow := [1; 1; 1; 1]
(Row2*A)*SumElRow = 4.22
# Выделение 1го столбца
Col1 := [1; 0; 0; 0]
A*Col1 = [1.05; 2.78; 2.01; 0.42]
# Сумма элементов первого столбца
SumElCol := [1, 1, 1, 1]
SumElCol*(A*Col1) = 6.26
# Переставить 1ю и 2ю строки
Swap := [0, 1, 0, 0; 1, 0, 0, 0; 0, 0, 1, 0; 0, 0, 0, 1]
Swap*A = [2.78, -0.84, 1.24, 1.04; 1.05, 0.05, 0.87, 0.99; 2.01, -0.3, 0.78, 0.21; 0.42, 1.6, -3.24, 0.1]
# Переставить 1й и 2й столбец
A*Swap = [0.05, 1.05, 0.87, 0.99; -0.84, 2.78, 1.24, 1.04; -0.3, 2.01, 0.78, 0.21; 1.6, 0.42, -3.24, 0.1]
# Задание 4
A1 := [-1, -2, 0; 0, 2, 0; -1, -2, 2; 1, 0, 1; -3, 1, -1]
A2 := [-2, 1, 1; -2, -2, 0; 0, 1, -2; 1, 2, 0; -1, -2, 1]
B := [3, 2, 0, 3; -2, 1, 2, 1; 3, 0, -2, -1]
G := [8; 6; 4; 6]
# Расчет агрегированных оценок воздействия проектов А1 и А2 на ОС
AB1 := A1*B
AB2 := A2*B
AO1 := AB1*G
AO2 := AB2*G
sum(AO1) = -200
sum(AO2) = -216
# Задание 3
E := [1, 0, 0, 0; 0, 1, 0, 0; 0, 0, 1, 0; 0, 0, 0, 1]
v := [1.05; 2.78; 2.01; 0.42]
# Вычисление H
H := E - 2*v*transpose(v)/|v|^2
H = [
    0.831001, -0.447445, -0.323513, -0.0675997;
    -0.447445, -0.184665, -0.856538, -0.178978;
    -0.323513, -0.856538, 0.380704, -0.129405;
    -0.0675997, -0.178978, -0.129405, 0.97296
]
# Доказательство ортогональности H
H*transpose(H) = [1, 0, 0, 0; 0, 1, 0, 0; 0, 0, 1, 0; 0, 0, 0, 1]
transpose(H)*H = [1, 0, 0, 0; 0, 1, 0, 0; 0, 0, 1, 0; 0, 0, 0, 1]
# Проверка свойств
# Обратная и транспонированная матрицы для ортогональной матрицы равны
H^-1 = [
    0.831001, -0.447445, -0.323513, -0.0675997;
    -0.447445, -0.184665, -0.856538, -0.178978;
    -0.323513, -0.856538, 0.380704, -0.129405;
    -0.0675997, -0.178978, -0.129405, 0.97296
]
transpose(H) = [
    0.831001, -0.447445, -0.323513, -0.0675997;
    -0.447445, -0.184665, -0.856538, -0.178978;
    -0.323513, -0.856538, 0.380704, -0.129405;
    -0.0675997, -0.178978, -0.129405, 0.97296
]
# Модуль определителя равен 1
|H| = -1
# Скалярное произведение двух строк равно 0
ORIGIN := 1
H[:, 1]*H[:, 2] = -3.98986e-17
H[:, 2]*H[:, 3] = -3.1225e-17
H[:, 3]*H[:, 4] = 2.77556e-17
# Задание 4
B := [0.63; 0.38; -0.17; 0.27]
A := [0.59, 0.13, 0.48, 0.84; 0.16, 0.20, 0.82, 0.39; -0.18, 0.24, 0.49, 0.34; 0.08, 0.79, -0.09, 0.14]
d := |A|
d = 0.14388
# Формулы Крамера
A1 := augment(B, submatrix(A, 1, 4, 2, 4))
A1 = [0.63, 0.13, 0.48, 0.84; 0.38, 0.2, 0.82, 0.39; -0.17, 0.24, 0.49, 0.34; 0.27, 0.79, -0.09, 0.14]
d1 := |A1|
d1 = 0.201094
Tmp := augment(B, submatrix(A, 1, 4, 3, 4))
A2 := augment(submatrix(A, 1, 4, 1, 1), Tmp)
d2 := |A2|
d2 = 0.046447
A2 = [0.59, 0.63, 0.48, 0.84; 0.16, 0.38, 0.82, 0.39; -0.18, -0.17, 0.49, 0.34; 0.08, 0.27, -0.09, 0.14]
Tmp := augment(B, submatrix(A, 1, 4, 4, 4))
A3 := augment(submatrix(A, 1, 4, 1, 2), Tmp)
d3 := |A3|
d3 = 0.0485878
A3 = [0.59, 0.13, 0.63, 0.84; 0.16, 0.2, 0.38, 0.39; -0.18, 0.24, -0.17, 0.34; 0.08, 0.79, 0.27, 0.14]
A4 := augment(submatrix(A, 1, 4, 1, 3), B)
d4 := |A4|
d4 = -0.0682878
A4 = [0.59, 0.13, 0.48, 0.63; 0.16, 0.2, 0.82, 0.38; -0.18, 0.24, 0.49, -0.17; 0.08, 0.79, -0.09, 0.27]
x := [d1/d; d2/d; d3/d; d4/d]
x = [1.39766; 0.322819; 0.337698; -0.474618]
# Метод обратной матрицы
x := A^-1*B
x = [1.39766; 0.322819; 0.337698; -0.474618]
# Решение lsolve
x := lsolve(A, B)
x = [1.39766; 0.322819; 0.337698; -0.474618]
# Задание 5
k := 0.05
B := [58, 43, 490, 383, 974; 355, 422, 256, 342, 1375; 355, 485, 197, 370, 1407]
Y := [1104; 1023; 678]
Z := [0.27; 0.07; 0.46]
# Вектор общего выпуска
X := B*[1; 1; 1; 1; 1]
X = [1948; 2750; 2814]
# Выполняем простроение структурной матрицы
X1 := submatrix(B, 1, 3, 1, 3)
X1 = [58, 43, 490; 355, 422, 256; 355, 485, 197]
# Берем главную диагональ обратной к структурной матрицы
i := 1 .. 3
X2[i] := 1/X[i]
Xinv := [X2[1], 0, 0; 0, X2[2], 0; 0, 0, X2[3]]
Xinv = [0.000513347, 0, 0; 0, 0.000363636, 0; 0, 0, 0.000355366]
# Вычислем структурную матрицу коэффициентов прямых затрат
A := X1*Xinv
A = [0.0297741, 0.0156364, 0.174129; 0.182238, 0.153455, 0.0909737; 0.182238, 0.176364, 0.0700071]
# Определяем матрицу E-A
E := identity(3)
E = [1, 0, 0; 0, 1, 0; 0, 0, 1]
AE := E - A
AE = [0.970226, -0.0156364, -0.174129; -0.182238, 0.846545, -0.0909737; -0.182238, -0.176364, 0.929993]
# Проверка условий Хаукина-Саймона
|AE| = 0.712905
|submatrix(AE, 1, 2, 1, 2)| = 0.818491
|submatrix(AE, 1, 1, 1, 1)| = 0.970226
# Определение выпуска при заданном конечном спросе
AEinv := AE^-1
AEinv = [1.08182, 0.0634752, 0.208767; 0.260987, 1.22116, 0.168323; 0.261484, 0.244019, 1.14811]
Y = [1104; 1023; 678]
X := AEinv*Y
X = [1400.81; 1651.5; 1316.73]
# Количество выбросов
X*Z = 1099.52
# Увеличение потребности в промышленности
Dx := k*X[2]
Dx = 82.5749
# Увеличение выпуска товаров и услуг
Xn := Dx*AEinv[:, 2]
Xn = [5.24146; 100.837; 20.1498]
# Увеличение количества выбросов
Xn*Z = 17.7427
