# 3.1 Модель "Динамика популяций" Аналитическое решение дифференциальных уравнений в MathCad
d/dt(x) == k*x - α*x^2
# После интегрированния диференциальное уравнение имеет вид:
integral(1/(x*(k - α*x)), x = x_0 .. x_1) == integral(1, t = 0 .. t_1) → ln(k/x_0 - α)/k - ln(k/x_1 - α)/k == t_1
# После копирования полученного результата и замены х1 на х, а t1 на t,получаем уравнение:
ln(k/x_0 - α)/k - ln(k/x - α)/k == t
# Выполняем упрощение :
ln(k/x_0 - α)/k - ln(k/x - α)/k == t simplify → (ln(k/x_0 - α) - ln(1/x*(k - α*x)))/k == t
# Используем ключевое слово solve для аналитического решения, то есть производим поиск зависимости биомассы популяции x от времени t:
(ln(k/x_0 - α) - ln(1/x*(k - α*x)))/k == t solve, x → x_0*k/(k*e^(-(k*t)) + α*x_0 - α*x_0*e^(-(k*t)))
# Исследование полученной модели
# Вариант 10
x01 := 0.24  # Начальное количество биомассы
k1 := 0.53  # Коэффициент прироста биомассы
t1 := 0, 0 + 0.1 .. 10
α1 := 0.41  # Коэффициент отмирания биомассы
x1(t1) := x01*k1/(k1*e^(-(k1*t1)) + α1*x01 - α1*x01*e^(-(k1*t1)))
# Количество биомассы при бесконечной длительности её существования при заданных условиях
limit(x1(t1), t1 → ∞) → 1.29268292683
# Когда начальное количество биомассы преодолевает эту величину, приблизительно в 2 раза:
x02 := 1.29268292683*2
x2(t1) := x02*k1/(k1*e^(-(k1*t1)) + α1*x02 - α1*x02*e^(-(k1*t1)))
# Строим график для заданных значений
# [plot: x1(t1), x2(t1), k1, α1 vs t1]
# Скорость прироста биомассы популяции:
v(t1) := d/dt1(x1(t1))
# при бесконечной длительности её существования в заданных условиях:
limit(v(t1), t1 → ∞) → 0.0
# Строим графики скорости роста биомассы популяции и изменения этой скорости в часах
# Момент времени, когда скорость прироста биомассы максимальна:
d^2/dt1^2(x1(t1)) == 0 solve, t1 →  # no stored result; disabled
# [plot: x1(t1), d/dt1(x1(t1)), d^2/dt1^2(x1(t1)), k1/α1 vs t1]
# 3.2 Модель "Хищник-жертва" Численное решение дифференциальных уравнений и их систем в MathCad
# Системы нелинейных дифференциальных уравнений первого порядка
d/dt(x1) == g*x1 - a*x1*x2
d/dt(x2) == -s*x2 + b*x1*x2
# Вариант 10
g := 5  # Коэффициент увеличения численности жертв при отсутствии хищников
s := 3  # Коэффициент уменьшения численности хищников при отсутствии жертв
a := 3  # Параметр, который описывает уменьшение численности жертв при встрече с хищниками
b := 1  # Параметр, который описывает увеличение численности хищников при встрече с жертвами
# Числовое решение системы дифференциальных уравнений
x_1(0) == 2
x_2(0) == 1.6  # Начальные значения популяции жертв и хищников
Y1 := [2; 1.6]
# Часовой интервал для численных расчётов
N := 400
# Число шагов для численного расчёта
t_k := 100  # Конечный момент времени
t_0 := 0  # Начальный момент времени
# Вектор содержит дифференциал уравнения
D(t, Y1) := [g*Y1[0] - a*Y1[0]*Y1[1]; -s*Y1[1] + b*Y1[0]*Y1[1]]
# Применение метода Рунге-Кутта.Решение Z представляет собой матрицу размером Nx3.Первый столбик - момент времени, следующие два столбика содержат значения функции в момент этого времени
Z1 := rkfixed(Y1, t_0, t_k, N - 1, D)
t := Z1[:, 0]
x1 := Z1[:, 1]
x2 := Z1[:, 2]
# Динамика изменения популяции жертв и хищников
max(x1) = 4.22624
max(x2) = 2.17636
i := 0 .. N - 1
min(x1) = 2
min(x2) = 1.23416
# [plot: x1[i], x2[i] vs t[i]]
# При:
d/dt1(x1) == 0
gg*xx1 - aa*xx1*xx2 == 0 solve, xx2 → gg/aa
# Таким образом,популяция жертв начинается возрастать при х2, которое равняется:
g/a = 1.66667
# При:
d/dt1(x2) == 0
-ss*xx2 - bb*xx1*xx2 == 0 solve, xx1 → -ss/bb
# Таким образом,популяция хищников начинается возрастать при х1, которое равняется:
s/b = 3
# Фазвое пространство
# Переодичность проявляется в фазовом пространстве в замкнутой фазовой траэктории
# [plot: x2 vs x1]
# 3.3 Модель Вольтера-Лотка "Хищник-жертва" с логической  поправкой
# Системы нелинейных дифференциальных уравнений первого порядка
d/dt(x1) == g*x1 - a*x1*x2 + γ*x1^2
d/dt(x2) == -s*x2 + b*x1*x2 + γ*x2^2
# Вариант 10
g := 5  # Коэффициент увеличения численности жертв при отсутствии хищников
s := 3  # Коэффициент уменьшения численности хищников при отсутствии жертв
a := 3  # Параметр, который описывает уменьшение численности жертв при встрече с хищниками
b := 1  # Параметр, который описывает увеличение численности хищников при встрече с жертвами
γ := 0.18  # Позитивная логическая поправка
# Числовое решение системы дифференциальных уравнений
x_1(0) == 3
x_2(0) == 1  # Начальные значения популяции жертв и хищников
Y1 := [3; 1]
# Часовой интервал для численных расчётов
N := 3
# Число шагов для численного расчёта
t_k := 10  # Конечный момент времени
t_0 := 0  # Начальный момент времени
# Вектор содержит дифференциал уравнения
D(t, Y1) := [g*Y1[0] - a*Y1[0]*Y1[1] + γ*Y1[0]^2; -s*Y1[1] + b*Y1[0]*Y1[1] + γ*Y1[1]^2]
Z1 := rkfixed(Y1, t_0, t_k, N - 1, D)
t := Z1[:, 0]
x1 := Z1[:, 1]
x2 := Z1[:, 2]
# Динамика изменения популяции жертв и хищников
# [plot: x1[i], x2[i] vs t[i]]
i := 0 .. N - 1
# Фазвое пространство
# Незамкнутая фазовая траектория.Амплитуда колебаний численности уменьшается
# [plot: x2 vs x1]
# Вариант 10
g := 5  # Коэффициент увеличения численности жертв при отсутствии хищников
s := 3  # Коэффициент уменьшения численности хищников при отсутствии жертв
a := 3  # Параметр, который описывает уменьшение численности жертв при встрече с хищниками
b := 1  # Параметр, который описывает увеличение численности хищников при встрече с жертвами
γ := -0.18  # Негативная логическая поправка
# Числовое решение системы дифференциальных уравнений
x_1(0) == 3
x_2(0) == 1  # Начальные значения популяции жертв и хищников
Y1 := [3; 1]
# Часовой интервал для численных расчётов
N := 400
# Число шагов для численного расчёта
t_k := 10  # Конечный момент времени
t_0 := 0  # Начальный момент времени
# Вектор содержит дифференциал уравнения
D(t, Y1) := [g*Y1[0] - a*Y1[0]*Y1[1] + γ*Y1[0]^2; -s*Y1[1] + b*Y1[0]*Y1[1] + γ*Y1[1]^2]
Z1 := rkfixed(Y1, t_0, t_k, N - 1, D)
t := Z1[:, 0]
x1 := Z1[:, 1]
x2 := Z1[:, 2]
# Динамика изменения популяции жертв и хищников
i := 0 .. N - 1
# [plot: x1[i], x2[i] vs t[i]]
# Фазвое пространство
# Незамкнутая фазовая траектория.Амплитуда колебаний численности уменьшается
# [plot: x2 vs x1]
# 3.4 Модель Холлинга-Тэннера "Конкурирующие виды"
# Системы нелинейных дифференциальных уравнений первого порядка
d/dt(x1) == r*(1 - x1/K)*x1 - (w*x1*x2/(D + x1))
d/dt(x2) == c*(1 - J*x2/x1)*x2
# Вариант 10
# Параметры модели
r := 1
K := 7
w := 1.72
c := 0.2
J := 0.5
d := 1.5
# Числовое решение системы дифференциальных уравнений
x_1(0) == 3
x_2(0) == 1  # Начальные значения популяции жертв и хищников
Y1 := [3; 1]
# Часовой интервал для численных расчётов
N := 600
# Число шагов для численного расчёта
t_k := 200  # Конечный момент времени
t_0 := 0  # Начальный момент времени
D(t, Y1) := [r*(1 - Y1[0]/K)*Y1[0] - (w*Y1[0]*Y1[1]/(d + Y1[0])); c*(1 - J*Y1[1]/Y1[0])*Y1[1]]  # Вектор содержит дифференциал уравнения
Z1 := rkfixed(Y1, t_0, t_k, N - 1, D)
t := Z1[:, 0]
x1 := Z1[:, 1]
x2 := Z1[:, 2]
# Динамика изменения популяции жертв и хищников
i := 0 .. N - 1
# [plot: x1[i], x2[i] vs t[i]]
# Фазовое пространство
# Фазовая траектория в образе стойкого граничного цикла, который наматывается снаружи на замкнутую кривую
# [plot: x2 vs x1]
c = 0.2
r*(K - d - 2)/(K*(1 + d)) = 0.2
