# Лабораторная работа №1
# Исследование простых функциональных зависимостей в экологии средстами Mathcad
# Вариант 5
# 1. Линейная зависимость
# τ - Возраст животного
τ := 2.2 + 0.05 .. 6  # Границы построение графика
# ω(τ) - Текущий вес животного
ω(a, b, τ) := a*τ + b  # Определение линейной зависимости
# Влияние параметра "a" | Влияние параметра "b"
a3 := 1.24
a1 := 0.23
b1 := 0.22
a2 := 0.74
b2 := 0.02
ω4(τ) := ω(a3, b2, τ)
ω1(τ) := ω(a1, b1, τ)
b3 := 3.47
ω5(τ) := ω(a3, b3, τ)
ω2(τ) := ω(a2, b1, τ)
b4 := 9.58
ω6(τ) := ω(a3, b4, τ)
ω3(τ) := ω(a3, b1, τ)
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# 2. Обратно-пропорциональная зависимость
# ν - Популяция хищников
# z(ν) - Популяция жертв
υ := 1.1 + 1 .. 46
z(c, ν) := c/ν  # Определение обратно-пропорциональной зависимости
c1 := 5897
c2 := 4971
c3 := 6476
z1(υ) := z(c1, υ)
z2(υ) := z(c2, υ)
z3(υ) := z(c3, υ)
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# 3. Дробно-линейная зависимость, формула Михаелиса - Ментен
# s - Концентрация питательных веществ
# M(s) - Скорость поглащения микроорганизмами питательных веществ
# Km - Постоянная Михаелиса
s := 0.0 + 0.01 .. 250
M(Mmax, Km, s) := Mmax*s/(Km + s)
Mmax1 := 700
Mmax2 := 1634
Mmax3 := 1519
Mmax4 := 1540
Km1 := 69
Km2 := 82
Km3 := 132
M1(s) := M(Mmax1, Km1, s)
M4(s) := M(Mmax2, Km1, s)
M2(s) := M(Mmax1, Km2, s)
M5(s) := M(Mmax3, Km1, s)
M3(s) := M(Mmax1, Km3, s)
M6(s) := M(Mmax4, Km1, s)
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# 4. Статичная зависимость
# τ - Возраст животного
# ω(τ() - текущий вес животного
τ := 2.2 + 0.01 .. 6
ω(a, b, τ) := a*(τ^b + 1)
b1 := 5.51
b2 := 4.03
b3 := 6.17
b4 := 7.29
a1 := 0.008
a2 := 0.016
a3 := 0.019
ω1(τ) := ω(a1, b1, τ)
ω4(τ) := ω(a1, b2, τ)
ω2(τ) := ω(a2, b1, τ)
ω5(τ) := ω(a1, b3, τ)
ω3(τ) := ω(a3, b1, τ)
ω6(τ) := ω(a1, b4, τ)
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# 5. Показательные и логарифмические зависимости
N0 := 200  # - Начальная численность популяции
Nmax := 1500  # - Емкость среды
t := 0.0 + 0.01 .. 10
# k - коэффициент размножение популяции
N(N0, Nmax, k, t) := N0 + (Nmax - N0)*(1 - e^(-k*t))
k1 := 0.23
k2 := 0.51
k3 := 0.95
N1(t) := N(N0, Nmax, k1, t)
N2(t) := N(N0, Nmax, k2, t)
N3(t) := N(N0, Nmax, k3, t)
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Tm := 50  # - Средняя продолжительность жизни
Tp := 2  # - Граничная продолжительсность жизни при действии большого кол-ва токсинов
p := 0.0 + 0.01 .. 30  # - Доза вредного вещества, которое влияет на организм
# k - Восприимчивость организма к токсину
T(Tp, Tm, k, p) := Tp + (Tm - Tp)*e^(-k*p)
k1 := 0.18
k2 := 0.34
k3 := 0.42
T1(p) := T(Tp, Tm, k1, p)
T2(p) := T(Tp, Tm, k2, p)
T3(p) := T(Tp, Tm, k3, p)
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Wmax := 20  # - Максимально возможный вес животного
t0 := 0.02
t := 0.0 + 0.01 .. 15
W(Wmax, a, t0, t) := Wmax*(1 - e^(-a*(t - t0)))^3  # - Улучшенная модель "вес - возраст"
a1 := 0.31
a2 := 0.82
a3 := 1.61
W1(t) := W(Wmax, a1, t0, t)
W2(t) := W(Wmax, a2, t0, t)
W3(t) := W(Wmax, a3, t0, t)
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